@Behaviour Elasticity;
@Author Helfer Thomas;
@Date 23/11/06;
@Description{
 A very first test
 (the most simple one in fact).
}

@UseQt true;
@ProvidesSymmetricTangentOperator;

@UMATFiniteStrainStrategies[umat] {None,FiniteRotationSmallStrain,
                                   MieheApelLambrechtLogarithmicStrain};

@AsterSaveTangentOperator[aster]        true;
@AsterGenerateMTestFileOnFailure[aster] true;

@MaterialProperty stress young;
young.setGlossaryName("YoungModulus");
@MaterialProperty real nu;
nu.setGlossaryName("PoissonRatio");
@MaterialProperty real rho;
rho.setGlossaryName("MassDensity");
@MaterialProperty real alpha;
alpha.setGlossaryName("ThermalExpansion");

@LocalVariable stress lambda;
@LocalVariable stress mu;

@Includes{
#include"TFEL/Material/Lame.hxx"
}

@InitLocalVars{
  using namespace tfel::material::lame;
  lambda = computeLambda(young,nu);
  mu = computeMu(young,nu);
}

@PredictionOperator{
  if(!((smt==ELASTIC)||(smt==SECANTOPERATOR)||(smt==TANGENTOPERATOR))){
    return FAILURE;
  }
  Dt=lambda*Stensor4::IxI()+2*mu*Stensor4::Id();
}

@Integrator{
  sig = lambda*trace(eto+deto)*StrainStensor::Id()+2*mu*(eto+deto);
  if(computeTangentOperator_){
    Dt = lambda*Stensor4::IxI()+2*mu*Stensor4::Id();
  }
}
