@DSL Implicit{parameters_as_static_variables : true};
@Behaviour ImplicitElasticityParametersAsStaticVariables;
@Author Thomas Helfer;
@Date 23 / 11 / 06;

@Epsilon 1.e-14;
@Theta 1;

@Brick StandardElasticity;
