@DSL IsotropicPlasticMisesFlow{use_stress_update_algorithm : true};
@Behaviour Plasticity8;
@Description {
  Test of the stress update algorithm with elastic material properties
  depending on the temperature, using quantities: the Young modulus and
  the Poisson ratio are evaluated at the beginning of the time step to
  compute the elastic strain.
}

@Epsilon 1e-15;
@UseQt true;

@Parameter temperature Ta = 2e3;
@Parameter stress s0 = 1e9;
s0.setGlossaryName("YieldStrength");

@ElasticMaterialProperties{"150e9*(1-T/Ta)", "0.3+0.1*T/Ta"};

@FlowRule {
  f = seq - s0;
  df_dseq = 1;
  df_dp = stress{};
}
