@InnerRadius 4.2e-3;
@OuterRadius 4.7e-3;
@NumberOfElements 1;
@ElementType 'Quadratic';
@PerformSmallStrainAnalysis true;
@RadialLoading 'TightPipe';
@FillingPressure      1.e5;
@FillingTemperature 293.15;

@Behaviour<cyrano> @library@ 'cyranoelasticity';
@MaterialProperty<constant> 'YoungModulus' 150e9;
@MaterialProperty<constant> 'PoissonRatio' 0.3;
@ExternalStateVariable 'Temperature' {0:293.15,1:693.15};

@Times {0,1};
